Plane Vanilla test
0.00
0 0 0
9.00 0.90 10.00
0.50 0.00 0.00
SURFACE
Wing
8 1.00 12 1.00
YDUPLICATE
0.0
ANGLE
2.0
SECTION
0.00 0.00 0.00 1.00 0.00 0 0
AFILE
sd7037.dat
CONTROL
flap 1.00 0.75 0.0 0.0 0.0 1.0
CONTROL
aileron -1.00 0.75 0.0 0.0 0.0 -1.0
CLAF
1.00
SECTION
0.20 5.00 1.00 0.60 0.00 0 0
AFILE
sd7037.dat
CONTROL
flap 1.00 0.75 0.0 0.0 0.0 1.0
CONTROL
aileron -1.00 0.75 0.0 0.0 0.0 -1.0
CLAF
1.00
SURFACE
H-stab
6 1.00 6 1.00
YDUPLICATE
0.0
TRANSLATE
4.00 0.00 0.00
SECTION
0.00 0.00 0.00 0.70 0.00 0 0
CONTROL
elevator 1.0 0.70 0.0 1.0 0.0 1.0
SECTION
0.14 1.25 0.00 0.42 0.00 0 0
CONTROL
elevator 1.0 0.70 0.0 1.0 0.0 1.0
SURFACE
V-stab
6 1.00 5 1.00
TRANSLATE
4.00 0.00 0.00
SECTION
0.00 0.00 0.00 0.70 0.00 0 0
CONTROL
rudder 1.0 0.50 0.0 0.0 1.0 1.0
SECTION
0.14 0.00 1.00 0.42 0.00 0 0
CONTROL
rudder 1.0 0.50 0.0 0.0 1.0 1.0
